T := 6*10^-3
a[0] := 2/T*integral(-t, t = -0.001 .. 0.001) + 2/T*integral(t - 0.002, t = 0.001 .. 0.002)
a[0] = -0.000166667
a[0]/2 = -8.33333e-5
ω := 2*π/T
ω = 1047.2
a[1] := 2/T*integral((-t)*cos(ω*t), t = -0.001 .. 0.001) + 2/T*integral((t - 0.002)*cos(ω*t), t = 0.001 .. 0.002)
a[1] = -2.82991e-5
b[1] := 2/T*integral((-t)*sin(ω*t), t = -0.001 .. 0.001) + 2/T*integral((t - 0.002)*sin(ω*t), t = 0.001 .. 0.002)
b[1] = -0.000367325
a[2] := 2/T*integral((-t)*cos(2*ω*t), t = -0.001 .. 0.001) + 2/T*integral((t - 0.002)*cos(2*ω*t), t = 0.001 .. 0.002)
a[2] = 0.000137832
b[2] := 2/T*integral((-t)*sin(2*ω*t), t = -0.001 .. 0.001) + 2/T*integral((t - 0.002)*sin(2*ω*t), t = 0.001 .. 0.002)
b[2] = -0.000342818
a[3] := 2/T*integral((-t)*cos(3*ω*t), t = -0.001 .. 0.001) + 2/T*integral((t - 0.002)*cos(3*ω*t), t = 0.001 .. 0.002)
a[3] = 6.75475e-5
b[3] := 2/T*integral((-t)*sin(3*ω*t), t = -0.001 .. 0.001) + 2/T*integral((t - 0.002)*sin(3*ω*t), t = 0.001 .. 0.002)
b[3] = -0.000106103
a[4] := 2/T*integral((-t)*cos(4*ω*t), t = -0.001 .. 0.001) + 2/T*integral((t - 0.002)*cos(4*ω*t), t = 0.001 .. 0.002)
a[4] = -6.89161e-5
b[4] := 2/T*integral((-t)*sin(4*ω*t), t = -0.001 .. 0.001) + 2/T*integral((t - 0.002)*sin(4*ω*t), t = 0.001 .. 0.002)
b[4] = 2.60214e-5
a[5] := 2/T*integral((-t)*cos(5*ω*t), t = -0.001 .. 0.001) + 2/T*integral((t - 0.002)*cos(5*ω*t), t = 0.001 .. 0.002)
a[5] = -6.72914e-5
b[5] := 2/T*integral((-t)*sin(5*ω*t), t = -0.001 .. 0.001) + 2/T*integral((t - 0.002)*sin(5*ω*t), t = 0.001 .. 0.002)
b[5] = 5.28906e-5
A[1] := sqrt(a[5]^2 + b[5]^2)
Φ[1] := -atan(b[5]/a[5])
A[1] = 8.55895e-5
Φ[1] = 38.1671 deg
